// COMSOL Multiphysics 6.2.0.290 model "GRM.mph"
// Liquid Chromatography
// Chromatography is an important group of methods for separating closely related components of complex mixtures. This example models the separation in a high-performance liquid chromatography (HPLC) column.
// Outline of the model tree
// Components: comp1 "Component 1", comp3 "组件 3"

Parameters
  L_c = 30[mm]  // Length column
  c01 = 13.92  // Maximum inlet injector concentration, component 1
  e_c = 0.5  // Porosity
  v_l = 0.0014147*2[m/s]  // Linear velocity, mobile phase
  D_1 = 0[m^2/s]  // Diffusion coefficient, component 1
  sads = 1.11  // exponential coefficient for ka
  sdep = 5.35  // exponential coefficient for kd
  sq = 7.03  // exponential coefficient for qmax
  phi0 = 0.05  // initial phi
  phie = 0.95  // final phi
  ts = 120 [s]  // end time for linear gradient
  te = 300 [s]  // total time
  beta = (1-e_c)/e_c  // phase ratio
  R1 = 1.35e-6 [m]  // radius of the shell
  Rin = 0.95e-6[m]  // radius of the core
  Dp = 1.8e-10 [m^2/s]  // pore diffusion
  e_p = 0.4  // pore porosity
  kf = 0.095[m/s]  // film diffusivity
  ka = 3.8  // adsorption constant for Langmuir
  kd = 9.04  // desorption constant for Langmuir
  qmax = 165.55  // maximum capacity for Langmuir
  c02 = 0  // for inlet profile
  Pe = v_l*L_c/D_1  // Pe number
  St = 3*L_c*kf/v_l/R1  // St number
  Bi = R1*kf/e_p/Dp  // Bi number

Functions
  pw2: Piecewise "ci" | funcname = ci; arg = t; extrap = none; smooth = contd2; zonelengthtype = absolute; smoothzone = 0.01/L_c*v_l; pieces = {{0, 0.4/L_c*v_l, c01/c01}, {0.4/L_c*v_l, (te+1)/L_c*v_l, c02/c01}}
  pw1: Piecewise "phi1" [comp3] | funcname = phi1; arg = t; smoothzone = 0.001; pieces = {{0, ts/L_c*v_l, phi0 + (phie-phi0) /ts*L_c/v_l *t}, {ts/L_c*v_l, (te+1)/L_c*v_l, phie}}
  int1: Interpolation [comp1]
    table = 
      {0, 0}
      {0.004716981, 0}
      {0.009433962, 0}
      {0.014150943, 0}
      {0.018867925, 0}
      {0.023584906, 0}
      {0.028301887, 0}
      {0.033018868, 0}
      {0.037735849, 0}
      {0.04245283, 0}
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  int2: Interpolation [comp1]
    table = 
      {0, 0}
      {0.004716981, 0}
      {0.009433962, 0}
      {0.014150943, 0}
      {0.018867925, 0}
      {0.023584906, 0}
      {0.028301887, 0}
      {0.033018868, 0}
      {0.037735849, 0}
      {0.04245283, 0}
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  int3: Interpolation [comp1]
    table = 
      {0, 0}
      {0.004716981, 0}
      {0.009433962, 0}
      {0.014150943, 0}
      {0.018867925, 0}
      {0.023584906, 0}
      {0.028301887, 0}
      {0.033018868, 0}
      {0.037735849, 0}
      {0.04245283, 0}
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  int4: Interpolation [comp1]
    table = 
      {0, 0}
      {0.004716981, 0}
      {0.009433962, 0}
      {0.014150943, 0}
      {0.018867925, 0}
      {0.023584906, 0}
      {0.028301887, 0}
      {0.033018868, 0}
      {0.037735849, 0}
      {0.04245283, 0}
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  int5: Interpolation [comp1]
    table = 
      {0, 0}
      {0.004716981, 0}
      {0.009433962, 0}
      {0.014150943, 0}
      {0.018867925, 0}
      {0.023584906, 0}
      {0.028301887, 0}
      {0.033018868, 0}
      {0.037735849, 0}
      {0.04245283, 0}
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  int6: Interpolation [comp1]
    table = 
      {0, 0}
      {0.004716946, 0}
      {0.009433892, 0}
      {0.014150838, 0}
      {0.018867784, 0}
      {0.02358473, 0}
      {0.028301676, 0}
      {0.033018622, 0}
      {0.037735568, 0}
      {0.042452515, 0}
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  int7: Interpolation [comp1]
    table = 
      {0, 0}
      {0.004717112, 0}
      {0.009434223, 0}
      {0.014151335, 0}
      {0.018868446, 0}
      {0.023585558, 0}
      {0.02830267, 0}
      {0.033019781, 0}
      {0.037736893, 0}
      {0.042454004, 0}
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  int8: Interpolation [comp1]
    table = 
      {0, 0}
      {0.004717112, 0}
      {0.009434223, 0}
      {0.014151335, 0}
      {0.018868446, 0}
      {0.023585558, 0}
      {0.02830267, 0}
      {0.033019781, 0}
      {0.037736893, 0}
      {0.042454004, 0}
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
Variables
  var2 "变量 2" [comp1]
    cave = aveop1(cl)*c01
  var3 "变量 3" [comp3]
    ka_eff = ka*exp(-sads*phi1(t))
    kd_eff = kd*exp(-sdep*phi1(t))
    q_eff = qmax*exp(-sq*phi1(t))
    q1 = q_eff*ka_eff/kd_eff*cp/(1+ka_eff/kd_eff*cp*c01)

Couplings
  aveop1: Average "平均值 1" on boundaries 2
  genext1: GeneralExtrusion "广义拉伸 1" on all domains | dstmap = x; usesrcmap = on; srcmap = x
  genext2: GeneralExtrusion "广义拉伸 2" on boundaries 3 | dstmap = {x, }; usesrcmap = on; srcmap = {x, }

Geometry
  geom1 "Geometry 1" [comp1] (1D, length unit m)
    i1: Interval
    fin: Finalize "Form Union"
  geom4 "几何 4" [comp3] (2D, length unit m)
    r1: Rectangle "矩形 1" | pos = {0, Rin/R1}; size = {1, (R1-Rin)/R1}
    fin: Finalize "形成联合体"

Physics
  cl: ConvectionDiffusionEquation [geom1] on all domains
    dependent variable cl
    EquationForm.form = Automatic
    Units.DependentVariableQuantity = none
    Units.CustomDependentVariableUnit = 1
    Units.SourceTermQuantity = none
    Units.CustomSourceTermUnit = 1
    cdeq1: ConvectionDiffusionEquation "对流-扩散方程 1" (default) | f = -beta*St*(cl-comp3.genext2(comp3.cp)); c = 1/Pe; be = 1
    zflx1: ZeroFluxBoundary "零通量 1" (default)
    init1: init "初始值 1" (default)
    flux1: FluxBoundary "通量/源 1" on boundaries 1 | g = ci(t); q = 1
  cp: CoefficientFormPDE [geom4] on all domains
    dependent variable cp
    Units.CustomDependentVariableUnit = 1
    Units.CustomSourceTermUnit = 1
    cfeq1: CoefficientFormPDE "系数形式偏微分方程 1" (default)
      c = {0, 0, 0, St/3/Bi}
      f = -(1-e_p)*d(q,t)
      da = e_p
      be = {0, -2*St/3/Bi/y}
    zflx1: ZeroFluxBoundary "零通量 1" (default)
    init1: init "初始值 1" (default)
    flux1: FluxBoundary "通量/源 1" on boundaries 3 | g = St/3*comp1.genext1(comp1.cl); q = St/3
  q: CoefficientFormPDE [geom4] on all domains
    dependent variable q
    Units.CustomDependentVariableUnit = 1
    Units.CustomSourceTermUnit = 1
    cfeq1: CoefficientFormPDE "系数形式偏微分方程 1" (default) | f = ka_eff*cp*(q_eff-q*c01)-kd_eff*q; da = v_l/L_c
    zflx1: ZeroFluxBoundary "零通量 1" (default)
    init1: init "初始值 1" (default)

Mesh
  mesh1 "Mesh 1" [geom1]
    size: MeshSizeDefault | hmax = 0.01; hgrad = 1; custom = on
    edg1: Edge on remaining entities
  mesh4 "网格 4" [geom4]
    map1: Map "映射 1" on remaining entities
      dis1: Distribution "分布 1" on boundaries 1, 4 | type = predefined; equidistant = on
      dis2: Distribution "分布 2" on boundaries 3 | numelem = 100; equidistant = on

Studies
  std1 "Study 1"
    time: Transient "Time Dependent"
      tlist = range(0,v_l/L_c,te/L_c*v_l)
      outputmap = {cl, physics, cp, all, q, all, frame:spatial1, physics, frame:spatial4, physics, frame:material1, physics, frame:material4, physics}

Solver configurations
  sol1 "Solution 1" (study std1)
    v1: Variables "Dependent Variables 1"
    t1: Time "Time-Dependent Solver 1"
      tlist = range(0,v_l/L_c,te/L_c*v_l)
      atolglobalvaluemethod = manual
      atolglobal = 1e-4
      maxorder = 2
      stabcntrl = on
      fc1: FullyCoupled
        linsolver = d1
        maxiter = 8
        damp = 0.9
        jtech = once
        stabacc = aacc
        aaccdim = 5
        aaccmix = 0.9
        aaccdelay = 1
      d1: Direct "Direct, concentrations (tds)" | linsolver = pardiso; pivotperturb = 1.0E-13

Datasets
  dset2: Solution "Study 1/Solution 2" | solution = sol1
  dset1: Solution | solution = sol1

Tables
  tbl2: Table "目标 表格 2"
    K1 (m^3/mol) | n01 (mol/m^2) | sk | sn | 目标
    0.04 | 1e-06 | -1 | -1 | 25967
    0.06 | 1e-06 | -1 | -1 | 18450
    0.04 | 1.2e-06 | -1 | -1 | 23265.6
    0.04 | 1e-06 | -0.8 | -1 | 22314.7
    0.04 | 1e-06 | -1 | -0.8 | 23292
    0.02 | 1e-06 | -1 | -1 | 47025.2
    0.04 | 8e-07 | -1 | -1 | 29981.3
    0.04 | 1e-06 | -1.2 | -1 | 30414.4
    0.04 | 1e-06 | -1 | -1.2 | 29193.8
    0.0607573 | 1.1087e-06 | -0.865081 | -0.900387 | 14707.8
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  tbl4: Table "目标 表格 4"
    K1 (m^3/mol) | n01 (mol/m^2) | sk | sn | 目标
    0.04 | 1e-06 | -4 | -4 | 7644.96
    0.06 | 1e-06 | -4 | -4 | 7644.96
    0.04 | 1.2e-06 | -4 | -4 | 7644.96
    0.04 | 1e-06 | -3.8 | -4 | 7644.96
    0.04 | 1e-06 | -4 | -3.8 | 7644.96
    0.02 | 1e-06 | -4 | -4 | 7644.96

Plots
  pg6: PlotGroup1D "resplot" | data = dset1
    glob2: Global "全局 2" | expr = comp1.cave; descr = GRM; legends = GRM
  pg7: PlotGroup2D "二维绘图组 7" | data = dset2
    surf1: Surface "表面 1" | data = dset2; expr = comp3.cp
  pg8: PlotGroup1D "1D Plot Group 8" | data = dset1
    lngr1: LineGraph on all domains | expr = cl

Exports
  data2: Data "数据 1"
    data = dset1
    expr = cl
    descr = 因变量 cl
    filename = C:\Users\baoch\Desktop\cl.csv
    transpose = on
    includenan = off
  data3: Data "数据 2"
    data = dset2
    expr = cp
    unit = 1
    descr = 因变量 cp
    filename = C:\Users\libaochen\Desktop\cp.csv
    transpose = on
    includenan = off
  data4: Data "数据 3"
    data = dset2
    expr = q
    unit = 1
    descr = 因变量 q
    filename = C:\Users\libaochen\Desktop\q.csv
    transpose = on
    includenan = off
  anim1: Animation "动画 1" | target = player; maxframes = 100; frametime = 0.5
  data5: Data "数据 5"
    data = dset1
    expr = comp1.cave
    unit = 1
    filename = C:\Users\baoch\Desktop\cave_0.9.csv
    transpose = on
    includenan = off