// COMSOL Multiphysics 6.2.0.290 model "transport_model_chromatography.mph"
// Outline of the model tree

Parameters
  L = 30[mm]
  c01 = 6.88[mol/m^3]
  F = (1-eps_p)/eps_p
  eps_p = 0.6
  u = 0.0028294[m/s]
  phi0 = 0.05
  phie = 0.95
  ts = 120[s]
  te = 300[s]
  K0 = 10
  sK = 0
  kf0 = 10
  skf = 0
  tau = u/L

Functions
  pw1: Piecewise "ci" | funcname = ci; arg = t; smooth = contd2; zonelengthtype = absolute; smoothzone = 0.01*tau; pieces = {{0, 0.4*tau, 1}, {0.4*tau, te*tau, 0}}
  pw2: Piecewise "phi1" | funcname = phi1; arg = t; pieces = {{0, ts*tau, phi0 + (phie-phi0) / ts *t/tau}, {ts*tau, (te+1)*tau, phie}}

Variables
  var1 "变量 1"
    cave = aveop1(c)
    q1 = K0*exp(-sK*phi)*c

Couplings
  aveop1: Average "平均值 1" on boundaries 2

Geometry
  geom1 "几何 1" (1D, length unit m)
    i1: Interval "线段间隔 1"
    fin: Finalize "形成联合体"

Physics
  c: StabilizedConvectionDiffusionEquation on all domains
    dependent variable c
    Units.DependentVariableQuantity = none
    Units.CustomDependentVariableUnit = mol/m^3
    Units.CustomSourceTermUnit = mol/m^3/s
    cdeq1: ConvectionDiffusionEquation "对流-扩散方程 1" (default) | c = 0; be = {1, 0, 0}; f = -F*d(q,t)
    init1: InitialValues "初始值 1" (default)
    ndflx1: NoDiffusiveFlux "无扩散通量 1" (default)
    dir1: DirichletBoundaryCondition "狄利克雷边界条件 1" on boundaries 1 | r = ci(t)
  q: StabilizedConvectionDiffusionEquation on all domains
    dependent variable q
    Units.DependentVariableQuantity = none
    Units.CustomDependentVariableUnit = 1
    Units.CustomSourceTermUnit = 1/s
    cdeq1: ConvectionDiffusionEquation "对流-扩散方程 1" (default) | da = tau; c = 0; a = 0; f = kf0*exp(-skf*phi)*(q1-q)
    init1: InitialValues "初始值 1" (default)
    ndflx1: NoDiffusiveFlux "无扩散通量 1" (default)
  phi: StabilizedConvectionDiffusionEquation on all domains
    dependent variable phi
    Units.CustomSourceTermUnit = 1/s
    cdeq1: ConvectionDiffusionEquation "对流-扩散方程 1" (default) | c = 0; be = {1, 0, 0}; f = 0
    init1: InitialValues "初始值 1" (default) | initialValue = phi0
    ndflx1: NoDiffusiveFlux "无扩散通量 1" (default)
    dir1: DirichletBoundaryCondition "狄利克雷边界条件 1" on boundaries 1 | r = phi1(t)

Mesh
  mesh1 "网格 1"
    size: MeshSizeDefault "大小" | hmax = 0.01; hgrad = 1; hauto = 2; custom = on
    edg1: Edge "边 1" on remaining entities

Studies
  std1 "研究 1"
    time: Transient "瞬态" | tlist = range(0,tau,te*tau)

Solver configurations
  sol1 "解 1" (study std1)
    v1: Variables "Dependent Variables 1"
    t1: Time "Time-Dependent Solver 1"
      tlist = range(0,tau,te*tau)
      rtol = 0.005
      atolmethod = {comp1_c, scaled, comp1_phi, scaled, comp1_q, scaled}
      atolvaluemethod = {comp1_c, factor, comp1_phi, factor, comp1_q, factor}
      atolfactor = {comp1_c, 0.05, comp1_phi, 0.05, comp1_q, 0.05}
      maxorder = 2
      stabcntrl = on
      fc1: FullyCoupled
        linsolver = d1
        maxiter = 8
        damp = 0.9
        jtech = once
        stabacc = aacc
        aaccdim = 5
        aaccmix = 0.9
        aaccdelay = 1
      d1: Direct "Direct (c) (Merged)" | linsolver = pardiso; pivotperturb = 1.0E-13
  sol2 "参数化解 1" (study std1)

Datasets
  dset1: Solution | solution = sol1
  dset2: Solution | solution = sol2

Tables
  tbl3: Table "目标 表格 3"
    K1 (m^3/mol) | qmax (mol/m^3) | 目标
    0.001 | 100 | 1733.52
    0.001002 | 100 | 1733.86
    0.001 | 100.2 | 1733.86
    0.000998 | 100 | 1733.53
    0.001 | 99.8 | 1733.54
    0.000999074 | 99.9107 | 1733.55
    0.001 | 99.9106 | 1733.79
    0.000999585 | 100.017 | 1733.42
    0.000998694 | 100.025 | 1733.8

Plots
  pg3: PlotGroup1D "一维绘图组 3" | data = dset1
    ptgr1: PointGraph "点结果图 1" on boundaries 2 | expr = comp1.cave; unit = mol/m^3; legends = TR with exp
    glob1: Global "全局 1" (disabled) | expr = int1(t); legends = wetlab
  pg1: PlotGroup1D "c" | data = dset1
    lngr1: LineGraph "线结果图 1" on domains 1 | expr = c; xdata = expr; xdataexpr = x
  pg2: PlotGroup1D "q" | data = dset1
    lngr1: LineGraph "线结果图 1" on domains 1 | expr = q; xdata = expr; xdataexpr = x

Exports
  data1: Data "数据 1"
    data = dset1
    expr = {c, }
    unit = {mol/m^3, }
    descr = {因变量, }
    filename = C:\Users\libaochen\Desktop\bulk.csv
    transpose = on